u := 0.1
lp1 := 0.25
lp2 := 0.2
lp3 := 0.05
p0 := 0
p1 := 0
p2 := 0
p3 := 0
p4 := 0
p5 := 0
p6 := 0
p7 := 0
p8 := 0
p9 := 0
p10 := 0
p11 := 0
p12 := 0
p13 := 0
p14 := 0
p15 := 0
Given
-p0*(lp2 + lp3) + p1*u + p4*u == 0
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-p1*(lp2 + lp3 + u) + p0*lp3 + p2*u + p5*u == 0
-p2*(lp2 + lp3 + u) + p1*lp3 + p3*u + p6*u == 0
-p3*(lp2 + u) + p2*lp3 + p7*u == 0
-p4*(lp1 + lp3 + u) + p0*lp2 + p5*u + p8*u == 0
-p5*(lp1 + lp3 + 2*u) + p1*lp2 + p4*lp3 + p6*u + p9*u == 0
-p6*(lp1 + lp3 + 2*u) + p2*lp2 + p5*lp3 + p7*u + p10*u == 0
-p7*(lp1 + 2*u) + p3*lp2 + p6*lp3 + p11*u == 0
-p8*(lp2 + lp3 + u) + p4*lp1 + p9*u + p12*u == 0
-p9*(lp2 + lp3 + 2*u) + p5*lp1 + p8*lp3 + p10*u + p13*u == 0
-p10*(lp2 + lp3 + 2*u) + p6*lp1 + p9*lp3 + p11*u + p14*u == 0
-p11*(lp2 + 2*u) + p7*lp1 + p10*lp3 + p15*u == 0
-p12*(lp3 + u) + p8*lp2 + p13*u == 0
-p13*(lp3 + 2*u) + p9*lp2 + p12*lp3 + p14*u == 0
-p14*(lp3 + 2*u) + p10*lp2 + p13*lp3 + p15*u == 0
-p15*(2*u) + p11*lp2 + p14*lp3 == 0
p0 + p1 + p2 + p3 + p4 + p5 + p6 + p7 + p8 + p9 + p10 + p11 + p12 + p13 + p14 + p15 == 1
Find(p0, p1, p2, p3, p4, p5, p6, p7, p8, p9, p10, p11, p12, p13, p14, p15) → [0.0296296296296; 0.0148148148148; 0.00740740740741; 0.0037037037037; 0.0592592592593; 0.0296296296296; 0.0148148148148; 0.00740740740741; 0.148148148148; 0.0740740740741; 0.037037037037; 0.0185185185185; 0.296296296296; 0.148148148148; 0.0740740740741; 0.037037037037]
